// COMSOL Multiphysics 6.1.0.252 model "simulation of magnetic force(Fm).mph"
// Outline of the model tree

Parameters
  radius = 4.7[mm]
  H = 2[mm]
  d = 3[cm]
  B0 = 1.3[T]
  m0 = pi*radius^2*H*B0/mu0_const
  km1 = 3*mu0_const*m^2/(2*pi)
  km2 = (5*H^2 - 15*radius^2)*m^2*mu0_const/(4*pi)
  m = m0*(pi*radius^2*H - 2*(2*pi*radius*rru^2*(1-pi/4)))/(pi*radius^2*H)
  rru = 0.3[mm]

Variables
  var1 "变量 1"
    km1 = 3*mu0_const*m^2/(2*pi)
    km2 = (5*H^2 - 15*radius^2)*m^2*mu0_const/(4*pi)

Coordinate systems
  ie1: InfiniteElement "无限元域 1" on domains 1, 5-8 | ScalingType = Cylindrical

Geometry
  geom1 "几何 1" (2D axisymmetric, length unit cm)
    r1: Rectangle "矩形 1" | pos = {radius/2, -H/2-d/2}; base = center; size = {radius, H}
    r2: Rectangle "矩形 2" | pos = {radius/2, H/2+d/2}; base = center; size = {radius, H}
    r3: Rectangle "矩形 3"
      pos = {2.5, 0}
      base = center
      layername = 层 1
      layer = 1
      layerright = on
      layertop = on
      size = {5, 9}
    fil1: Fillet "倒圆角 1" | point = r2(1) points 2, 3; r1(1) points 2, 3; radius = rru
    fin: Finalize "形成联合体"

Materials
  mat1: Common "Air" on all domains
    def "Basic"
      thermalexpansioncoefficient = alpha_p(pA,T)
      molarmass = 0.02897[kg/mol]
      bulkviscosity = muB(T)
      relpermeability = 1
      relpermittivity = 1
      dynamicviscosity = eta(T)
      ratioofspecificheat = 1.4
      electricconductivity = 0[S/m]
      heatcapacity = Cp(T)
      density = rho(pA,T)
      thermalconductivity = k(T)
      soundspeed = cs(T)
      eta: Piecewise | arg = T; pieces = {200.0, 1600.0, -8.38278E-7+8.35717342E-8*T^1-7.69429583E-11*T^2+4.6437266E-14*T^3-1.06585607E-17*T^4}; argunit = K; fununit = Pa*s
      Cp: Piecewise | arg = T; pieces = {200.0, 1600.0, 1047.63657-0.372589265*T^1+9.45304214E-4*T^2-6.02409443E-7*T^3+1.2858961E-10*T^4}; argunit = K; fununit = J/(kg*K)
      rho: Analytic | expr = pA*0.02897/R_const[K*mol/J]/T; args = {pA, T}; fununit = kg/m^3; argunit = {Pa, K}
      k: Piecewise | arg = T; pieces = {200.0, 1600.0, -0.00227583562+1.15480022E-4*T^1-7.90252856E-8*T^2+4.11702505E-11*T^3-7.43864331E-15*T^4}; argunit = K; fununit = W/(m*K)
      cs: Analytic | expr = sqrt(1.4*R_const[K*mol/J]/0.02897*T); args = T; fununit = m/s; argunit = K
      an1: Analytic | funcname = alpha_p; expr = -1/rho(pA,T)*d(rho(pA,T),T); args = {pA, T}; fununit = 1/K; argunit = {Pa, K}
      an2: Analytic "Analytic 2a" | funcname = muB; expr = 0.6*eta(T); args = T; fununit = Pa*s; argunit = K
    RefractiveIndex
      n = 1
      ki = 0
    NonlinearModel
      BA = (def.gamma+1)/2
    idealGas
      Rs = R_const/Mn
      heatcapacity = Cp(T)
      ratioofspecificheat = 1.4
      molarmass = 0.02897
      Cp: Piecewise | arg = T; pieces = {200.0, 1600.0, 1047.63657-0.372589265*T^1+9.45304214E-4*T^2-6.02409443E-7*T^3+1.2858961E-10*T^4}; argunit = K; fununit = J/(kg*K)
  mat2: Common "Magnets" on domains 3, 4

Physics
  mfnc: MagnetostaticsNoCurrents "磁场，无电流" on all domains
    dependent variable Vm
    mfc1: MagneticFluxConservation "磁通量守恒 1" (default)
    axi1: AxialSymmetry "轴对称 1" (default)
    mi1: MagneticInsulation "磁绝缘 1" (default)
    init1: init "初始值 1" (default)
    fcal1: ForceCalculation "力计算 1" on domains 4
    mfc2: MagneticFluxConservation "down" on domains 3
      ConstitutiveRelationBH = Magnetization
      M = {0, 0, B0/mu0_const}
      materialType = solid
    mfc3: MagneticFluxConservation "up" on domains 4
      ConstitutiveRelationBH = Magnetization
      M = {0, 0, -B0/mu0_const}
      materialType = solid
    zsp1: ZeroMagneticScalarPotential "零磁标势 1" on boundaries 2, 15, 19, 24-27

Mesh
  mesh1 "网格 1"
    size: MeshSizeDefault "大小" | table = cfd; hauto = 1
    dis1: Distribution "分布 1" on boundaries 1, 13, 18, 21-23 | type = predefined
    map1: Map "映射 1" on domains 1, 5-8 | adjustedgdistr = on; smoothmaxiter = 4; smoothmaxdepth = 4
    bl1: BndLayer "边界层 1" on domains 2-4
      blp: BndLayerProp "边界层属性" on boundaries 6, 8, 10, 12, 16, 17, 28-31
  adaptmesh1 "“1”级自适应网格 1"
    size: MeshSizeDefault "大小" | hmax = 0.603; hmin = 0.0027; hcurve = 0.3; hgrad = 1.3
    copy1: Copy "复制 1"
      counter = 1
      mesh = mesh1
      source = domains 2-4
      destination = domains 2-4
      smoothmaxiter = 4
      smoothmaxdepth = 4
    adap1: Adapt "自适应 1" on domains 2-4
      solution = sol15
      horder = 6
      method = modify
      sizeexpr = 0.006
      solupdatenum = 2
    dis1: Distribution "分布 1" on boundaries 1, 13, 18, 21-23 | type = predefined
    map1: Map "映射 1" on domains 1, 5-8 | adjustedgdistr = on; smoothmaxiter = 4; smoothmaxdepth = 4

Studies
  std1 "研究 1"
    param: Parametric "参数化扫描" | pname = d; plistarr = range(2,0.2,4); punit = cm
    stat: Stationary "稳态"
      adaptselection = domains 2-4
      errestandadap = adaption
      meshadaptmethod = modify
      userngen = on

Solver configurations
  sol1 "解 1" (study std1)
    v1: Variables "因变量 1"
    s1: Stationary "稳态求解器 1" | stol = 0.0007
      dDef: Direct "直接"
      eeDef: ErrorEstimation "误差估计"
      adDef: Adaption "自适应网格细化"
      fc1: FullyCoupled "全耦合 1" | linsolver = dDef
  sol2 "参数化解 1" (study std1)
  sol14 "自适应网格细化解 1" (study std1)

Datasets
  dset1: Solution | solution = sol1
  dset2: Solution | solution = sol2
  rev1: Revolve2D "二维旋转 1" | data = dset2; startangle = -90; revangle = 225
  dset3: Solution | solution = sol14

Derived values
  int1: IntVolume "体积分 1" | data = rev1; table = tbl1; expr = 1

Plots
  pg1: PlotGroup2D "磁通密度模 (mfnc)" | data = dset2; dataisaxisym = on
    surf1: Surface "表面 1" | expr = mfnc.normB
    str1: Streamline "流线 1" on boundaries 1-31 | expr = {mfnc.Br, mfnc.Bz}; udist = 0.02
      col1: Color "颜色表达式 1" | expr = mfnc.normB
      filt1: Filter "过滤器 1" | expr = !isScalingSystemDomain
  pg2: PlotGroup3D "磁通密度模，回转几何 (mfnc)" | data = rev1
    vol1: Volume "体 1" | expr = mfnc.normB
  pg3: PlotGroup2D "磁标势 (mfnc)" | data = dset2; dataisaxisym = on
    surf1: Surface "表面 1" | expr = Vm
    str1: Streamline "流线 1" on boundaries 1-31 | expr = {mfnc.Hr, mfnc.Hz}; udist = 0.02
      col1: Color "颜色表达式 1" | expr = Vm
      filt1: Filter "过滤器 1" | expr = !isScalingSystemDomain
  pg4: PlotGroup1D "一维绘图组 4" | data = dset1
    glob1: Global "Compair"
      data = dset2
      expr = {mfnc.Forcez_0, (3*mu0_const*m^2/(2*pi))/(d+H)^4 + ((5*H^2 - 15*radius^2)*m^2*mu0_const/(4*pi))/(d+H)^6, 3*mu0_const*m^2/(2*pi)/(d+H)^4}
      unit = {N, N, N}
      descr = {simulation, theory**, theory}
      title = Fm-d
      legends = {simulation, theory**, theory}
    glob2: Global "erf%"
      data = dset2
      expr = {100*((3*mu0_const*m^2/(2*pi))/(d+H)^4 + ((5*H^2 - 15*radius^2)*m^2*mu0_const/(4*pi))/(d+H)^6 - mfnc.Forcez_0)/(mfnc.Forcez_0+0.0002), 100*((3*mu0_const*m^2/(2*pi))/(d+H)^4 - mfnc.Forcez_0)/(mfnc.Forcez_0+0.0002)}
      unit = {1, 1}
      descr = {erf**%, erf%}
      legends = {erf**%, erf%}

Exports
  data1: Data "数据 1" | data = dset2; expr = mfnc.Forcez_0; filename = D:\Users\Pilot Pigeon\Desktop\Untitled.txt