// COMSOL Multiphysics 6.1.0.252 model "板测试.mph"
// Outline of the model tree

Parameters
  L = 12[cm]
  a = 0.6[cm]
  H = 0.5[mm]
  L0 = 1.5[cm]
  E1 = 71.9[GPa]
  rho1 = 2253[kg/m^3]
  sigma = 0.20
  Ke = 0.25*E1*a*(H/(L-L0))^3/(1-sigma^2)  // Ke
  F = 0.15[N]
  LL = F/Ke[mm]

Variables
  var1 "变量 1"
    delta_x = aveop1(z)

Couplings
  aveop1: Average "平均值 1" on boundaries 14

Common definitions
  free1: DeformingDomainDeformedGeometry "变形域 1" on domains 1, 2 | stiffeningFactor = 8

Geometry
  geom1 "几何 1" (3D, length unit cm)
    blk1: Block "长方体 1"
      pos = {0, 0, -H}
      size = {L, a, H}
      layername = 层 1
      layer = L0
      layerleft = on
      layerbottom = off
    blk2: Block "长方体 2" | pos = {L-0.3, 0, -H}; size = {0.3, a, H}
    dif1: Difference "差集 1" | input = blk1; input2 = blk2
    blk3: Block "长方体 3" | pos = {L-0.3, 0, -H}; size = {0.3, a, H}
    fin: Finalize "形成联合体"

Materials
  mat1: Common "材料 1" on all domains
    def "基本"
      density = rho1
    Enu "杨氏模量和泊松比"
      E = E1
      nu = sigma

Physics
  solid: SolidMechanics "固体力学" on all domains
    dependent variable u = {u, v, w}
    lemm1: LinearElasticModel "线弹性材料 1" (default)
    free1: Free "自由 1" (default)
    init1: init "初始值 1" (default)
    fix1: Fixed "固定约束 1" on boundaries 3, 4
    bndl1: BoundaryLoad "边界载荷 1" on boundaries 14 | LoadType = TotalForce; Ftot = {0, 0, F}

Mesh
  mesh1 "网格 1"
    size: MeshSizeDefault "大小" | table = cfd; hauto = 8
    fq1: FreeQuad "自由四边形网格 1" on boundaries 4, 9, 14
    swe1: Sweep "扫掠 1" on remaining entities

Studies
  std1 "研究 1"
    param: Parametric "参数化扫描" | pname = F; plistarr = range(0.015,0.015,0.15); punit = N
    stat: Stationary "稳态" | geometricNonlinearity = on
  std2 "研究 2"
    param: Parametric "参数化扫描" | pname = L; plistarr = range(5,0.5,16); punit = cm
    stat: Stationary "稳态" | geometricNonlinearity = on
  std3 "研究 3"
    stat: Stationary "稳态" | geometricNonlinearity = on

Solver configurations
  sol1 "解 1" (study std1)
    v1: Variables "因变量 1"
      comp1_material_disp: Field "材料网格位移 (comp1.material.disp)" | scalemethod = manual; scaleval = 0.00133649890172
    s1: Stationary "稳态求解器 1"
      dDef: Direct "直接"
      p1: Parametric "参数化 1" | pname = F; plistarr = range(0.015,0.015,0.15); punit = N; pcontinuationmode = no
      se1: Segregated "分离 1"
        ss1: SegregatedStep "材料坐标系的坐标" | segvar = {comp1_material_disp}; linsolver = dDef
        ss2: SegregatedStep "固体力学" | segvar = {comp1_u}; linsolver = d1
      d1: Direct "建议的直接求解器 (solid)" | linsolver = pardiso; pivotperturb = 1.0E-9; nliniterrefine = on
  sol2 "解 2" (study std2)
    v1: Variables "因变量 1"
      comp1_material_disp: Field "材料网格位移 (comp1.material.disp)" | scalemethod = manual; scaleval = 0.00133649890172
    s1: Stationary "稳态求解器 1"
      dDef: Direct "直接"
      se1: Segregated "分离 1"
        ss1: SegregatedStep "材料坐标系的坐标" | segvar = {comp1_material_disp}; linsolver = dDef
        ss2: SegregatedStep "固体力学" | segvar = {comp1_u}; linsolver = d1
      d1: Direct "建议的直接求解器 (solid)" | linsolver = pardiso; pivotperturb = 1.0E-9; nliniterrefine = on
  sol3 "参数化解 1" (study std2)

Datasets
  dset1: Solution | solution = sol1
  dset2: Solution | solution = sol2
  dset3: Solution | solution = sol3

Plots
  pg1: PlotGroup3D "应力 (solid)" | data = dset3
    vol1: Volume "体 1" | expr = solid.mises
      def: Deform "变形" | expr = {u, v, w}; descr = 位移场
  pg2: PlotGroup1D "一维绘图组1" | data = dset1; xlabel = L (cm); ylabel = delta X(cm)
    glob1: Global "compair"
      data = dset3
      expr = {delta_x, F/Ke}
      unit = {cm, cm}
      descr = {simulate, theory}
      title = (L)compair_F = 0.15N
    glob2: Global "compair 1"
      data = dset3
      expr = {100*(delta_x-F/Ke)/(delta_x+0.001), }
      unit = {1, }
      descr = {erf%, theory}
      title = (L)erf%
  pg5: PlotGroup1D "一维绘图组2" | data = dset1; xlabel = F (N); ylabel = delta X(cm)
    glob1: Global "compair"
      data = dset1
      expr = {delta_x, F/Ke}
      unit = {cm, cm}
      descr = {simulate, theory}
      title = (F)compair L = 10.5cm
    glob2: Global "compair 1"
      data = dset1
      expr = {100*(delta_x-F/Ke)/(delta_x+0.001), }
      unit = {1, }
      descr = {erf%, }
      title = (F)erf%
  pg3: PlotGroup1D "erf" | data = dset1
    glob1: Global "erf" | data = dset3; expr = 100*(delta_x - F/Ke)/delta_x; descr = erf%; title = erf
  pg4: PlotGroup3D "应力 (solid) 1" | data = dset3
    vol1: Volume "体 1" | expr = solid.mises
      def: Deform "变形" | expr = {u, v, w}; descr = 位移场